// COMSOL Multiphysics 6.3.0.335 model "vk_Gosia_v2.10.mph"
// Outline of the model tree

Parameters
  Nlayer = 26*2  // Layers of electrodes
  av = 1e7 [1/m]  // Specific interfacial area per unit volume (From Newman book problem 22.1) ** changed for reaction distribution **
  Ly = 145[mm]  // Electrode width
  Lz = 195[mm]  // Electrode height
  Wtab = 48[mm]  // Tab width
  Htab = 25[mm]  // Tab height
  Itab = 10[mm]  // Shifted position of tabs distance to outer position
  x_anode_tab = -L_neg_cc
  y_anode_tab = Itab
  z_anode_tab = Lz
  x_cathode_tab = L_neg + L_pos + L_pos_cc - L_pos_tab
  y_cathode_tab = Ly - Itab - Wtab
  z_cathode_tab = Lz
  F = 96487 [C/mol]  // Farday constant
  R = 8.3143 [J/mol/K]  // Gas constant
  n = 1  // Number of electrons
  x_anode_bar = x_anode_tab + L_neg_tab - Lbar
  y_anode_bar = y_anode_tab
  z_anode_bar = z_anode_tab + Htab
  Hbar = 152 [mm]  // Bar length (G)
  Lbar = 3.25 [mm]  // Bar thickness (G)
  Wbar = Wtab  // Bar width
  x_cathode_bar = x_cathode_tab + L_pos_tab - Lbar
  y_cathode_bar = y_cathode_tab
  z_cathode_bar = z_cathode_tab + Htab
  Cpel = 2.4407 [MJ/m^3/K]  // Heat capacitance of the solid phase (Srinivasan & Wang)
  keff = 137 [W/m/K]  // Thermal conductivity of separator (Srinivasan & Wang)
  h1 = 8.3691 [W/m^2/K]  // convective coefficient ** fitting parameter **
  ku = 0.18 [V]  // Slope of OCV curve
  keref = 12 [mS/m]  // Ionic conductivity at Tref
  alfa_ke = 1 [mS/m/K]  // Temp dependence of keref
  i0ref = 20 [A/m^2]  // Exch current dens at Tref
  Ei0 = 0 [kJ/mol]  // Temp dependence of Ei0 (also act.nrg)
  delS = -0.0388 [mV/K]  // Entropy per nF
  Crate = 8 [1/h]  // C-rate
  BatteryCap = 9 [Ah]
  dT_init = 0 [K/s]  // Initial value of del T / del t
  dQ_dt_init = 0 [1/s]
  BatteryVolume = (L_neg+L_pos)*Ly*Lz/2  // Just take one electrode thickness!!!
  Lanode = (Lanode_act + Lcathode_act)/2  // 17.5 [um]
  Lcathode = (Lanode_act + Lcathode_act)/2  // 31.8 [um]
  L_neg = Lanode * Nlayer
  L_pos = Lcathode*Nlayer
  L_neg_cc = (L_neg_cc_act + L_pos_cc_act)/2
  L_pos_cc = (L_neg_cc_act + L_pos_cc_act)/2
  L_sep = 13.67 [um]
  L_neg_tab = L_neg_cc
  L_pos_tab = L_pos_cc
  t_th = Cpel*L_cell/h1  // Thermal time constant (Jie et al. eq 1)
  L_cell = 4.97 [mm]  // Cell thickness
  rho_Al = 2700 [kg/m^3]  // Density (Al)
  Cp_Al = 900 [J/(kg*K)]  // Heat capacity at constant pressure (Al)
  Cpel_Al = Cp_Al * rho_Al
  ks_Al = 238 [W/(m*K)]  // Thermal conductivity (Al)
  sigma_Al = 3.774e7 [S/m]  // Electric conductivity of Aluminum
  rho_Cu = 8960 [kg/m^3]
  Cp_Cu = 389 [J/(kg*K)]  // Heat capacity at constant pressure of Copper
  Cpel_Cu = Cp_Cu * rho_Cu  // Density of copper
  ks_Cu = 398 [W/(m*K)]  // Thermal conductivity of Copper
  sigma_Cu = 5.89e7 [S/m]  // Electric conductivity of Copper
  avi0 = av*i0ref
  Cpcc = 3.1363e6 [J/m^3/K]  // (Srinivasan & Wang) 700 [J/kg/K]
  hys_mag = 0.02 [V]  // magnitude of hysteresis (one-sided)
  pulse_period = if(Crate==8[1/h], 50 [s], 100 [s])
  Tref = 25 [degC]  // Reference temperature (room)
  Tend = 891 [s]  // End time.
  N_long = 95  // Number of pixels in long part
  N_short = 71  // Number of pixels in short part
  I_cell = BatteryCap*Crate  // Discharge current (positive dch)
  iapp = I_cell/(Wbar*Lbar)  // Current density
  Qmax = BatteryCapActual/BatteryVolume  // Capacity density of battery
  v = h1/Cpel
  Qinit = 0.7
  Tinf = T0_4Cch  // Ambient temperature (21.418)
  T0 = Tinf  // Initial temperature
  Lanode_act = 17.5 [um]  // 17.5 [um]
  Lcathode_act = 31.8 [um]  // 31.8 [um]
  L_neg_cc_act = 10.67[um] * Nlayer/2  // Divided by two to account for double usage
  L_pos_cc_act = 18.33[um] * Nlayer/2
  kappa_0 = keref + (T0-Tref)*alfa_ke
  cp_el = 859.2 [J/kg/K]  // Specific heat of electrode
  rho_el = 2300 [kg/m^3]  // Electrode density
  Cp_el = Cpel/rho_el  // Electrode heat capacity.
  Cpel_cc = 3.1363[MJ/m^3/K]  // (Srinivasan & Wang) 700 [J/kg/K] - Howie
  rho_cc = Cpel_cc / Cp_cc  // Howie
  Cp_cc = 700 [J/kg/K]
  sigma_cc = 1e7 [S/m]  // Howie, not much realistic but ok.
  ks_cc = 380 [W/(m*K)]  // Howie
  sigma_el = 100 [S/m]  // Electrode electrical conductivity.
  kyy = keff
  kzz = keff
  kxx = keff_x
  T0_8Cdch = 22.021 [degC]
  T0_8C50 = 21.418 [degC]
  BatteryCapActual = BatteryCap
  T0_2C_dch = 21.882 [degC]
  T0_8Cch = 20.524 [degC]
  T0_10Cdch = 20.947 [degC]
  current_CC = iapp*cc_current(t)
  current_pulse = iapp*pulse(t)
  delS_mol = 32 [J/mol/K]
  delS_mol2 = delS_mol/F
  dEeqdT_LFP = -0.1 [mV/K]  // Constant temperature deviation of LFP entropy
  keff_x = keff
  Ei0_eff = exp(-Ei0/R*(1/T0-1/Tref))
  i00 = i0ref*Ei0_eff
  hbar = 71.2145 [W/m^2/K]  // h for the bars
  T0_8C70 = 21.093 [degC]
  T0_8C30 = 21.371 [degC]
  Qinit_p = 1 - Qinit  // Initial SOC pos. electrode
  Qinit_n = Qinit  // Initial SOC neg. electrode
  T0_2C30 = 22.674 [degC]
  T0_2C70 = 22.096 [degC]
  T0_4C70 = 22.303 [degC]
  T0_4C50 = 22.394 [degC]
  T0_6Cch = 20.738 [degC]
  T0_4Cch = 22.554 [degC]
  U0 = U_OCP(Qinit_p)  // U_OCP(Qinit_p)

Functions
  wv1: Wave "Pulse Current Input" | funcname = square; type = square; ncontder = 1; period = pulse_period
  wv2: Wave "CC current" | funcname = cc_current; type = square; smooth = 0.01; ncontder = 1; period = 50000 [s]
  an7: Analytic | funcname = pulse; expr = square(t); args = t; fununit = V; argunit = s
  step1: Step | smooth = 0.01; locationdef = beginning
  int3: Interpolation
    funcnametable = {int1, 1}
    funcname = U_OCP_dch
    table = 
      {1, 2.0000000000000}
      {0.99988981, 2.5048}
      {0.99976924, 2.5093}
      {0.99965954, 2.5142}
      {0.99954934, 2.5186}
      {0.99943964, 2.5227}
      {0.99932995, 2.527}
      {0.99920937, 2.5315}
      {0.99909918, 2.5357}
      {0.9989895, 2.5396}
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    interp = cubicspline
    extrap = linear
    fununit = V
    plotleftextrap = off
    plotrightextrap = off
  int4: Interpolation
    funcnametable = {int1, 1}
    funcname = U_OCP_ch
    table = 
      {1, 2.0053}
      {0.99989069, 2.5164}
      {0.99978088, 2.5251}
      {0.99967107, 2.5332}
      {0.99956126, 2.5409}
      {0.99945095, 2.5477}
      {0.99934115, 2.5544}
      {0.99923134, 2.5607}
      {0.99912153, 2.5666}
      {0.99901122, 2.5726}
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    interp = cubicspline
    extrap = linear
    fununit = V
    plotleftextrap = off
    plotrightextrap = off
  an1: Analytic | funcname = U_OCP; expr = (U_OCP_ch(x) + U_OCP_dch(x))/2.0; fununit = V
  an6: Analytic "Linear OCV" (disabled) | funcname = U_linear; expr = U_OCP(Qinit_p) - ku*(qc - Qinit_p) + ku*0.001*(log(1-qc+0.1) - log(qc+0.0000001)); args = qc; fununit = V
  an8: Analytic "Linear OCV 1" | funcname = U_linear; expr = U0 - ku*(qc - Qinit_p); args = qc; fununit = V
  pw1: Piecewise
    arg = qc
    smoothzone = 1e-2
    pieces = 
      {0, 1-cutoff, U_OCP(Qinit_p) - ku*((1-cutoff) - Qinit_p) - 2*(qc- (1-cutoff))}
      {1-cutoff, cutoff, U_OCP(Qinit_p) - ku*(qc - Qinit_p)}
      {cutoff, 1, U_OCP(Qinit_p) - ku*(cutoff - Qinit_p) - 2*(qc- cutoff)}
    pname = {cutoff, ku_cutoff}
    plist = {0.99, 4500}
  int2: Interpolation
    funcnametable = {int2, 1}
    funcname = dEeqdT_C_int_dch
    table = 
      {1.4, -8.82352941176}
      {1.26975425331, -6.86274509804}
      {1.02400756144, -4.34173669468}
      {0.933081285444, -0.980392156863}
      {0.778260869565, -11.6246498599440}
      {0.684877126654, -13.3053221288515}
      {0.618525519849, -13.3053221288515}
      {0.5202268431, -12.1848739495798}
      {0.426843100189, -3.78151260504}
      {0.289224952741, 1.26050420168}
      {0.190926275992, 5.74229691877}
      {0.1, 43.5574229691877}
    fununit = J/mol/K
  int5: Interpolation
    funcnametable = {int2, 1}
    funcname = dEeqdT_C_int_ch
    table = 
      {1.3, -28.82352941}
      {1.169754253, -26.8627451}
      {0.924007561, -14.34173669}
      {0.833081285, -10.98039216}
      {0.67826087, -21.62464986}
      {0.584877127, -23.30532213}
      {0.51852552, -23.30532213}
      {0.420226843, -22.18487395}
      {0.3268431, -13.78151261}
      {0.189224953, -8.739495798}
      {0.090926276, -4.257703081}
      {0, 150.557423}
    fununit = J/mol/K
  an2: Analytic | funcname = delS_int_ch; expr = (dEeqdT_LFP - dEeqdT_C_int_ch(x)/F)/2; fununit = V/K
  an3: Analytic | funcname = delS_int_dch; expr = (-dEeqdT_LFP + dEeqdT_C_int_dch(x)/F)/2; fununit = V/K
  int7: Interpolation
    funcnametable = {int2, 1}
    funcname = dEeqdT_C_Jie
    table = {{0, 3.0e-4}, {0.17, 0}, {0.24, -6e-5}, {0.28, -1.6e-4}, {0.5, -1.6e-4}, {0.54, -9e-5}, {0.71, -9e-5}, {0.85, -1.0e-4}, {1.0, -1.2e-4}, {, }, {, }, {, }}
    interp = piecewisecubic
    fununit = V/K
  int8: Interpolation
    funcnametable = {int2, 1}
    funcname = delS_Jalkanen
    table = 
      {0, -38.338}
      {0.01012, -34.855}
      {0.019933, -38.253}
      {0.025759, -40.398}
      {0.049678, -28.145}
      {0.074746, -13.376}
      {0.088658, -9.3161}
      {0.10028, -6.606}
      {0.20055, -3.7564}
      {0.29991, 2.3166}
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    extrap = linear
    fununit = J/mol/K
  an4: Analytic | funcname = delS_Jie; expr = -dEeqdT_C_Jie(x) - 1e-4; fununit = V/K
  int9: Interpolation
    funcnametable = {int2, 1}
    funcname = delS_Jie_supp
    table = 
      {0, -0.399382716049}
      {0.0169646778342, -0.350227584487}
      {0.0247631595458, -0.329325144449}
      {0.0332705941402, -0.309068566322}
      {0.0417780287346, -0.289399135387}
      {0.0517033690947, -0.270059974747}
      {0.0623376623377, -0.250353847113}
      {0.0729719555807, -0.230977989774}
      {0.0850241545894, -0.212678568954}
      {0.0992032122467, -0.192226275097}
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    fununit = mV/K
  an5: Analytic "i0_T_effect" | funcname = i0_T_effect; expr = exp(-Ei0/R*(1/x-1/Tref)); argunit = K

Variables
  var11 "CC - discharge" (disabled)
    current = current_CC
    DelSrxn_p = +delS_Jie_supp(qc)/2  // +delS_Jie(1-q)/2
    DelSrxn_n = -delS_Jie_supp(q)/2  // -delS_Jie(q)/2
    U_full_cell = U_OCP_dch(qc) + Uentropy  // U_OCP_dch(q)
    epsilon = 1e-4
  var12 "CC - charge" (disabled)
    current = -current_CC
    DelSrxn_p = +delS_Jie_supp(qc)/2  // +delS_Jie(1-q)/2
    DelSrxn_n = -delS_Jie_supp(q)/2  // -delS_Jie(q)/2
    U_full_cell = U_OCP_ch(qc) + Uentropy  // U_OCP_dch(q)
  var13 "Pulse"
    current = current_pulse
    U_full_cell = U_linear(qc) + Uhys + Uentropy  // U_linear
    DelSrxn_p = delS/2
    DelSrxn_n = -delS/2
  var14 "CC model with pulse." (disabled)
    current = current_pulse
    U = U_CC
    DelSrxn_p = +delS_Jie(1-q)/2  // -delS_Jie(q)/2
    DelSrxn_n = -delS_Jie(q)/2
    U_OCP_CC_p = U_OCP_dch(q)/2  // U_OCP_dch(q)
    U_OCP_CC_n = U_OCP_dch(1-q)/2  // U_OCP_dch(1-q)
  var10 "All domains"
    Phis_init = U0/2  // Init value for Phis
    Phie_init = 1e-4 [V]  // Init value for Phie
    Uhys = -hys_mag*sign(current)  // Positive means discharge so should be smaller
    Uentropy = DelSrxn*(T-Tref)
  var3 "Anode/Cathode" on domains 5, 6
    kappa_e = keref + (T-Tref)*alfa_ke
    i0 = i0ref*exp(-Ei0/R*(1/T-1/Tref))
    eta = (Phis-Phie-U)
    Nly = Nlayer  // Number of layers of this region
    ik = ik2  // if(q>1, max(ik2,0), if(q<0, min(ik2,0), ik2))
    ik2 = i0*n*F*eta/(R*T)
  var1 "CC - Cu" on selection sel8
    kappa_s = sigma_cc  // Electrical conductivity
    ks = ks_cc  // Thermal conductivity
    Nly = Nlayer  // Number of layers of this region
    Cpel_domain = Cpel_cc
    Cp_domain = Cp_cc
    rho_domain = rho_cc
    ks_domain = ks_cc
  var7 "Cathode (LFP)" on selection sel6
    kappa_s = sigma_el  // LiC6 conductivity (M. Doyle and Y. Fuentes JECS 2003)
    q0 = Qinit_p  // Initial SOC
    Cp_domain = Cp_el
    rho_domain = rho_el
    ks_domain = keff
    Cpel_domain = Cpel
    U = U_full_cell/2
    qc = q  // Cathode side q
    DelSrxn = DelSrxn_p
  var6 "Anode (Graphite - C)" on selection sel5
    kappa_s = sigma_el  // LiC6 conductivity (M. Doyle and Y. Fuentes JECS 2003)
    q0 = Qinit_n  // Initial SOC
    Cp_domain = Cp_el
    rho_domain = rho_el
    ks_domain = keff
    Cpel_domain = Cpel
    U = -U_full_cell/2
    qc = 1 - q  // Cathode side q
    DelSrxn = DelSrxn_n
  var2 "CC - Al" on selection sel4
    kappa_s = sigma_cc  // Electrical conductivity
    ks = ks_cc  // Thermal conductivity
    Nly = Nlayer  // Number of layers of this region
    Cpel_domain = Cpel_cc
    Cp_domain = Cp_cc
    rho_domain = rho_cc
    ks_domain = ks_cc
  var9 "Tab Aluminum" on selection sel3
    kappa_s = sigma_cc  // Electrical conductivity
    ks = ks_cc  // Thermal conductivity
    Nly = 1  // Number of layers of this region
    Cpel_domain = Cpel_cc
    Cp_domain = Cp_cc
    rho_domain = rho_cc
    ks_domain = ks_cc
  var8 "Tab Copper" on selection sel1
    kappa_s = sigma_cc  // Electrical conductivity
    ks = ks_cc  // Thermal conductivity
    Nly = 1  // Number of layers of this region
    Cpel_domain = Cpel_cc
    Cp_domain = Cp_cc
    rho_domain = rho_cc
    ks_domain = ks_cc
  var5 "Copper Bars" on domains 1, 4
    kappa_s = sigma_Cu  // Electrical conductivity
    ks = ks_Cu  // Thermal conductivity
    Nly = 1  // Number of layers of this region
    Cpel_domain = Cpel_Cu
    Cp_domain = Cp_Cu
    rho_domain = rho_Cu
    ks_domain = ks_Cu
  var17 "8C 30%" (disabled)
    Cpel = 2.5609 [MJ/m^3/K]  // Heat capacitance of the solid phase (Srinivasan & Wang)
    keff = 161.4 [W/m/K]  // Thermal conductivity of separator (Srinivasan & Wang)
    h1 = 9.30 [W/m^2/K]  // convective coefficient ** fitting parameter **
    ku = 0.3281 [V]  // Slope of OCV curve
    keref = 13.7 [mS/m]  // Ionic conductivity at Tref
    alfa_ke = 0.5672 [mS/m/K]  // Temp dependence of keref
    i0ref = 14.9141 [A/m^2]  // Exch current dens at Tref
    Ei0 = 8.75 [kJ/mol]  // Temp dependence of Ei0 (also act.nrg)
    delS = -0.0831 [mV/K]  // Entropy per nF
  var15 "8C 50%" (disabled)
    Cpel = 2.5 [MJ/m^3/K]  // Heat capacitance of the solid phase (Srinivasan & Wang)
    keff = 28.77 [W/m/K]  // Thermal conductivity of separator (Srinivasan & Wang)
    h1 = 10.6 [W/m^2/K]  // convective coefficient ** fitting parameter **
    ku = 0.1547 [V]  // Slope of OCV curve
    keref = 10.87 [mS/m]  // Ionic conductivity at Tref
    alfa_ke = 2 [mS/m/K]  // Temp dependence of keref
    i0ref = 7.3219 [A/m^2]  // Exch current dens at Tref
    Ei0 = 0 [kJ/mol]  // Temp dependence of Ei0 (also act.nrg)
    delS = 0.0956 [mV/K]  // Entropy per nF
  var16 "8C 70%" (disabled)
    Cpel = 2.72 [MJ/m^3/K]  // Heat capacitance of the solid phase (Srinivasan & Wang)
    keff = 160 [W/m/K]  // Thermal conductivity of separator (Srinivasan & Wang)
    h1 = 8.77 [W/m^2/K]  // convective coefficient ** fitting parameter **
    ku = 0.1 [V]  // Slope of OCV curve
    keref = 10.87 [mS/m]  // Ionic conductivity at Tref
    alfa_ke = 2 [mS/m/K]  // Temp dependence of keref
    i0ref = 65.3668 [A/m^2]  // Exch current dens at Tref
    Ei0 = 0 [kJ/mol]  // Temp dependence of Ei0 (also act.nrg)
    delS = 0.1528 [mV/K]  // Entropy per nF
  var18 "8C 70% 1" (disabled)
    Cpel = 2 [MJ/m^3/K]  // Heat capacitance of the solid phase (Srinivasan & Wang)
    keff = 102.65 [W/m/K]  // Thermal conductivity of separator (Srinivasan & Wang)
    h1 = 8.25 [W/m^2/K]  // convective coefficient ** fitting parameter **
    ku = 0.5 [V]  // Slope of OCV curve
    keref = 43.28 [mS/m]  // Ionic conductivity at Tref
    alfa_ke = 2.1844 [mS/m/K]  // Temp dependence of keref
    i0ref = 7.9 [A/m^2]  // Exch current dens at Tref
    Ei0 = 42.5 [kJ/mol]  // Temp dependence of Ei0 (also act.nrg)
    delS = 0.0938 [mV/K]  // Entropy per nF

Selections
  sel11: Explicit "Anode bar" on domains 1
  sel12: Explicit "Cathode bar" on domains 4
  sel3: Explicit "Cathode Tab (Aluminum)" on domains 8
  sel4: Explicit "Cathode Current Collector (Aluminum)" on domains 7
  sel6: Explicit "Cathode (LFP)" on domains 6
  sel5: Explicit "Anode (Graphite - C)" on domains 5
  sel8: Explicit "Anode Current Collector (Copper)" on domains 2
  sel1: Explicit "Anode Tab (Copper)" on domains 3
  sel9: Explicit "Cathode end" on boundaries 22
  sel10: Explicit "Anode end" on boundaries 4
  uni1: Union "Current collectors" | entitydim = 3; input = {sel4, sel8}
  uni2: Union "Tabs" | entitydim = 3; input = {sel3, sel1}
  uni3: Union "Metal foil" | entitydim = 3; input = {uni1, uni2, uni5}
  uni4: Union "Anode/Cathode" | entitydim = 3; input = {sel6, sel5}
  uni5: Union "Copper bars" | entitydim = 3; input = {sel11, sel12}
  uni6: Union "Electrolyte domain" | entitydim = 3; input = {uni4}
  uni7: Union "Electronic domain" | entitydim = 3; input = {uni8, uni9}
  uni8: Union "Anode parts" | entitydim = 3; input = {sel11, sel5, sel8, sel1}
  uni9: Union "Cathode parts" | entitydim = 3; input = {sel12, sel3, sel4, sel6}

Probes
  dom4: Domain "SOC anode min" on selection sel5 | type = minimum; probename = dom_soc1; expr = q; unit = 1; table = tbl24
  dom1: Domain "SOC anode avg." on selection sel5 | probename = dom_soc2; expr = q; unit = 1; table = tbl24
  dom6: Domain "SOC anode max" on selection sel5 | type = maximum; probename = dom_soc3; expr = q; unit = 1; table = tbl24
  dom5: Domain "SOC cathode min" on selection sel6
    type = minimum
    probename = dom_soc4
    expr = q
    unit = 1
    table = tbl24
  dom3: Domain "SOC cathode avg." on selection sel6 | probename = dom_soc5; expr = q; unit = 1; table = tbl24
  dom7: Domain "SOC cathode max" on selection sel6
    type = maximum
    probename = dom_soc6
    expr = q
    unit = 1
    table = tbl24
  dom2: Domain "ik probe" on domains 6 | expr = ik; unit = A/m^2; table = tbl1
  bnd4: Boundary "Vout" on selection sel9 | expr = Phis; unit = V; descr = Dependent variable Phis; table = tbl1
  bnd1: Boundary "Avg Temperature front" on boundaries 7
    expr = T
    unit = degC
    descr = Dependent variable T
    table = tbl1
  bnd3: Boundary "Avg Temperature back" on boundaries 42
    expr = T
    unit = degC
    descr = Dependent variable T
    table = tbl1
  bnd7: Boundary "Avg Temperature front - ht" on boundaries 7 | expr = T; unit = degC; descr = Temperature; table = tbl1
  bnd8: Boundary "Avg Temperature back - ht" on boundaries 42 | expr = T; unit = degC; descr = Temperature; table = tbl1
  dom8: Domain "q_rxn_anode" on selection sel5
    type = integral
    expr = av*ik*eta
    unit = W
    descr = q_rnx_anode
    table = tbl25
  dom9: Domain "q_rev_anode" on selection sel5
    type = integral
    expr = av*ik*T*DelSrxn
    unit = W
    descr = q_rev_anode
    table = tbl25
  dom10: Domain "q_ohm_solid_anode" on selection sel5
    type = integral
    expr = kappa_s*( (Nly*Phisx)^2 + Phisy^2 + Phisz^2)
    unit = W
    descr = q_ohm_solid_anode
    table = tbl25
  dom11: Domain "q_ohm_ionic_anode" on selection sel5
    type = integral
    expr = kappa_e*( (Nly*Phiex)^2+Phiey^2 + Phiez^2)
    unit = W
    descr = q_ohm_ionic_anode
    table = tbl25
  dom16: Domain "q_ohm_anode" on selection sel5
    type = integral
    expr = kappa_s*( (Nly*Phisx)^2 + Phisy^2 + Phisz^2) + kappa_e*( (Nly*Phiex)^2+Phiey^2 + Phiez^2)
    unit = W
    descr = q_ohm_anode
    table = tbl25
  dom12: Domain "q_rxn_cathode" on selection sel6
    type = integral
    expr = av*ik*eta
    unit = W
    descr = q_rxn_cathode
    table = tbl25
  dom13: Domain "q_rev_cathode" on selection sel6
    type = integral
    expr = av*ik*T*DelSrxn
    unit = W
    descr = q_rev_cathode
    table = tbl25
  dom14: Domain "q_ohm_solid_cathode" on selection sel6
    type = integral
    expr = kappa_s*( (Nly*Phisx)^2 + Phisy^2 + Phisz^2)
    unit = W
    descr = q_ohm_solid_cathode
    table = tbl25
  dom15: Domain "q_ohm_ionic_cathode" on selection sel6
    type = integral
    expr = kappa_e*( (Nly*Phiex)^2+Phiey^2 + Phiez^2)
    unit = W
    descr = q_ohm_ionic_cathode
    table = tbl25
  dom17: Domain "q_ohm_cathode" on selection sel6
    type = integral
    expr = kappa_s*( (Nly*Phisx)^2 + Phisy^2 + Phisz^2) + kappa_e*( (Nly*Phiex)^2+Phiey^2 + Phiez^2)
    unit = W
    descr = q_ohm_cathode
    table = tbl25
  var1: GlobalVariable "Current density" | probename = I_density; expr = current; unit = A/m^2; table = tbl1

Pairs
  ap15: Identity "Anode tab - bar" | source: boundaries 3; destination: boundaries 16
  ap22: Identity "Anode CC - tab" | source: boundaries 10; destination: boundaries 15
  ap17: Identity "Anode - Anode CC" | source: boundaries 12; destination: boundaries 25
  ap18: Identity "Anode - Cathode" | source: boundaries 30; destination: boundaries 31
  ap19: Identity "Cathode tab - bar" | source: boundaries 21; destination: boundaries 46
  ap20: Identity "Cathode - Cathode CC" | source: boundaries 36; destination: boundaries 37
  ap21: Identity "Cathode CC - tab" | source: boundaries 40; destination: boundaries 45

Coordinate systems
  sys1: Boundary "Boundary System 1"

Geometry
  geom1 "Cell geometry" (3D, length unit mm)
    blk7: Block "Anode bar" | size = {Lbar, Wbar, Hbar}; pos = {x_anode_bar, y_anode_bar, z_anode_bar}
    blk5: Block "Anode tab" | size = {L_neg_tab, Wtab, Htab}; pos = {x_anode_tab, y_anode_tab, z_anode_tab}
    blk2: Block "Anode CC" | size = {L_neg_cc, Ly, Lz}; pos = {-L_neg_cc, 0, 0}; axistype = cartesian
    blk1: Block "Anode" | size = {L_neg, Ly, Lz}; axistype = cartesian
    blk3: Block "Cathode" | size = {L_pos, Ly, Lz}; pos = {L_neg, 0, 0}; axistype = cartesian
    blk4: Block "Cathode CC" | size = {L_pos_cc, Ly, Lz}; pos = {L_neg + L_pos, 0, 0}; axistype = cartesian
    blk6: Block "Cathode tab" | size = {L_pos_tab, Wtab, Htab}; pos = {x_cathode_tab, y_cathode_tab, z_cathode_tab}
    blk8: Block "Cathode bar" | size = {Lbar, Wbar, Hbar}; pos = {x_cathode_bar, y_cathode_bar, z_cathode_bar}
    fin: Finalize "Form Assembly" | action = assembly

Materials
  mat1: Common "Current collector" on selection uni1
    def: def "Basic"
      density = rho_cc
      thermalconductivity = ks_cc
      electricconductivity = diag{sigma_cc*Nly^2, sigma_cc, sigma_cc}
      heatcapacity = Cp_cc
      Nly = Nlayer
  mat2: Common "Tabs" on selection uni2
    def: def "Basic"
      density = rho_cc
      thermalconductivity = ks_cc
      electricconductivity = diag{sigma_cc*Nly^2, sigma_cc, sigma_cc}
      heatcapacity = Cp_cc
      Nly = 1
  mat3: Common "Bars" on domains 1, 4
    def: def "Basic"
      density = rho_Cu
      thermalconductivity = ks_Cu
      electricconductivity = sigma_Cu
      heatcapacity = Cp_Cu
      Nly = 1
  mat4: Common "Anode (C)" on selection sel5
    def: def "Basic"
      density = rho_el
      thermalconductivity = keff
      electricconductivity = diag{sigma_el*Nly^2, sigma_el, sigma_el}
      heatcapacity = Cp_el
      Nly = Nlayer
    ElectrodePotential: ElectrodePotential "Equilibrium potential"
      Eeq = U
      dEeqdT = DelSrxn_n
      cEeqref = 3000
  mat5: Common "Cathode (LFP)" on selection sel6
    def: def "Basic"
      density = rho_el
      thermalconductivity = keff
      electricconductivity = diag{sigma_el*Nly^2, sigma_el, sigma_el}
      heatcapacity = Cp_el
      Nly = Nlayer
    ElectrodePotential: ElectrodePotential "Equilibrium potential"
      Eeq = U
      dEeqdT = DelSrxn_p
      cEeqref = 3000

Physics
  poeq: PoissonEquation "Phis poisson" on selection uni7
    dependent variable Phis
    EquationForm.form = Transient
    Units.DependentVariableQuantity = none
    Units.CustomDependentVariableUnit = V
    Units.CustomSourceTermUnit = A/m^3
    peq1: PoissonEquation "Poisson for anode/cathode" (default) | f = -av*ik; c = diag{kappa_s*Nly^2, kappa_s, kappa_s}
    zflx1: ZeroFluxBoundary "Zero Flux" (default)
    init1: init "Initial Values (Anode)" (default) | Phis = 0 [V]
    dcont1: Continuity (default) | pairDisconnect = 0
    init2: init "Initial Values (Cathode)" on selection uni9 | Phis = Phis_init
    peq2: PoissonEquation "Poisson for CC/tabs/bar" on selection uni3 | f = 0; c = diag{kappa_s*Nly^2, kappa_s, kappa_s}
    flux1: FluxBoundary "Current source (cathode/pos bar)" on selection sel9 | g = -current
    dir1: DirichletBoundary "Electrical ground (anode/neg bar)" on selection sel10 | r = 0; useDirichletCondition = 1
    zflx2: PairZeroFluxBoundary "Zero Flux (Seperator)" on all boundaries | pairs = ap18
  poeq2: PoissonEquation "Phie Poisson" on selection uni6
    dependent variable Phie
    ShapeProperty.shapeFunctionType = shlag
    EquationForm.form = Automatic
    Units.DependentVariableQuantity = none
    Units.CustomDependentVariableUnit = V
    Units.CustomSourceTermUnit = A/m^3
    peq1: PoissonEquation "Poisson's Equation for anode/cathode" (default)
      f = av*ik
      c = diag{kappa_e*Nly^2, kappa_e, kappa_e}
    zflx1: ZeroFluxBoundary "Zero Flux 1" (default)
    init1: init "Initial Values 1" (default) | Phie = Phie_init; Phiet = 0
    dcont1: Continuity (default)
  g: GeneralFormPDE "SOC equation" on selection uni4
    dependent variable q
    ShapeProperty.shapeFunctionType = shlag
    ShapeProperty.order = 2
    EquationForm.form = Automatic
    Units.CustomSourceTermUnit = 1/s
    gfeq1: GeneralFormPDE "SOC for anode/cathode" (default) | f = -av*ik/Qmax; Ga = {0, 0, 0}; da = 1
    zflx1: ZeroFluxBoundary "Zero Flux 1" (default)
    init1: init "Initial Values 1" (default) | q = q0; qt = dQ_dt_init
    dcont1: Continuity (default) | pairDisconnect = 1
    zflx2: PairZeroFluxBoundary "Zero Flux (Seperator)" on all boundaries | pairSelection = list; pairs = ap18
  ht: HeatTransfer "Heat Transfer in Solids" on all domains
    dependent variable T
    PhysicalModelProperty.Tref = Tref
    solid1: SolidHeatTransferModel "Heat Equation" (default)
      k_mat = userdef
      k = ks_domain
      rho_mat = userdef
      rho = rho_domain
      Cp_mat = userdef
      Cp = Cp_domain
    init1: init "Initial Values 1" (default) | Tinit = T0
    ins1: ThermalInsulation (default)
    dcont1: Continuity (default)
    hf1: HeatFluxBoundary "Heat Flux 1" on boundaries 3, 4, 6-12, 15, 16, 21, 22, 24-42, 45, 46
      HeatFluxType = ConvectiveHeatFlux
      h = h1
      Text = Tinf
      materialType = solid
    hs1: HeatSource "Heat Source Anode/Cathode" on selection uni4
      heatSourceType = GeneralSource
      Q0 = kappa_s*( (Nly*Phisx)^2 + Phisy^2 + Phisz^2) +kappa_e*( (Nly*Phiex)^2+Phiey^2 + Phiez^2)+av*ik*eta + av*ik*T*DelSrxn
      materialType = solid
    hs2: HeatSource "Heat Source CC/tabs/bars" on selection uni3
      heatSourceType = GeneralSource
      Q0 = kappa_s*( (Nly*Phisx)^2 + Phisy^2 + Phisz^2 )
      materialType = solid
    solid2: SolidHeatTransferModel "Heat Equation for anode/cathode" on selection uni4
      k_mat = userdef
      k = diag{kxx, kyy, kzz}
      rho_mat = userdef
      rho = rho_domain
      Cp_mat = userdef
      Cp = Cp_domain

Mesh
  mesh1 "Mesh 1"
    size: MeshSizeDefault | hauto = 8
    map2: Map "Mapped - bar" on boundaries 1, 19
      size1: Size on boundaries 1, 19 | hauto = 8
    swe2: Sweep "Swept 2" on domains 3, 8
      size1: Size on domains 3, 8 | hauto = 3
    swe1: Sweep "Swept 1" on remaining entities | facemethod = tri; sourceface = boundaries 7; targetface = boundaries 42
      size1: Size on entire geometry | hauto = 7
      dis3: Distribution "Current collectors" on domains 2, 7 | numelem = 1
      dis1: Distribution "Cathode mesh" on selection sel6 | type = predefined; elemratio = 8; growthrate = exponential
      dis2: Distribution "Anode mesh" on selection sel5
        type = predefined
        reverse = on
        elemratio = 8
        growthrate = exponential
    map1: Map "Mapped 1" (disabled) on boundaries 42

Studies
  std1 "Study 1"
    time: Transient "Time Dependent"
      tlist = range(0,1,Tend)
      outputmap = {poeq, physics, poeq2, physics, hteq, physics, g, physics, frame:spatial1, physics, frame:material1, physics}
      tauto = automatic

Solver configurations
  sol1 "Solution 1" (study std1)
    v1: Variables "Dependent Variables 1"
    t1: Time "Time-Dependent Solver 1"
      tlist = range(0,1,Tend)
      tstepsbdf = strict
      initialstepbdf = 1e-7
      minorder = 2
      estrat = exclude
      tstepsgenalpha = strict
      dDef: Direct | pivotperturb = 1.0E-14; nliniterrefine = on
      se1: Segregated | segstabacc = segaacc; segaaccmix = 0.9
        ssDef: SegregatedStep
          segvar = {comp1_Phis, comp1_q, comp1_Phie}
          subdtech = auto
          subdamp = 5
          subjtech = minimal
          subtermconst = itertol
          subadapttol = on
          subminstep = 1.0E-6
          maxsubiter = 25
          subntolfact = 1
        ss1: SegregatedStep "Temperature equation"
          segvar = {comp1_T}
          subtermconst = itertol
          subiter = 4
          subntolfact = 1
      st2: StopCondition
        stopcondterminateon = {true, true}
        stopconddesc = {Stop expression 1, Stop expression 2}
        stopcondarr = {comp1.bnd4 < 2 [V], comp1.bnd4 > 4 [V]}
      hwacc1: HardwareAcceleration | dgacc = on

Datasets
  dset1: Solution | solution = sol1
  cln1: CutLine3D "Cut Line 3D z=L"
    data = dset1
    genpoints = {{-0.277419, 73.0571, 92.0704}, {3.04016, 76.5382, 92.8523}}
  cln2: CutLine3D | data = dset1; genpoints = {{1.20001, 75, 0}, {5.45852, 150, 65.0263}}
  cpl1: CutPlane
    data = dset1
    planetype = general
    genpoints = {{0.05434, 73.9852, 116.7}, {0.05434, 74.9852, 116.7}, {0.05434, 73.9852, 117.7}}
  surf1: Surface "Back surface" on boundaries 42 | data = dset1
  surf2: Surface "Front surface" on boundaries 7 | data = dset1
  dset3: Solution "Probe Solution 3" on boundaries 22 | solution = sol1
  dset4: Solution "Probe Solution 4" | solution = sol1
  avh1: Average "Avg Temperature front" on boundaries 7 | data = dset4
  avh2: Average "Avg Temperature back" on boundaries 42 | data = dset4
  avh3: Average "SOC anode avg." on domains 5 | data = dset4
  avh4: Average "ik probe" on domains 6 | data = dset4
  int4_ds1: Grid1D
  int4_ds2: Grid1D | function = int3
  an1_ds1: Grid1D "Grid 1D 1a"
  cln3: CutLine3D | data = dset1; genpoints = {{1.2818, 72.5, 0}, {1.2818, 72.5, 195}}
  avh5: Average "Vout" on boundaries 22 | data = dset4
  max1: Maximum "SOC cathode max" on domains 6 | data = dset4
  avh6: Average "SOC cathode avg." on domains 6 | data = dset4
  min1: Minimum "SOC anode min" on domains 5 | data = dset4
  min2: Minimum "SOC cathode min" on domains 6 | data = dset4
  max2: Maximum "SOC anode max" on domains 5 | data = dset4
  avh7: Average "Avg Temperature front - ht" on boundaries 7 | data = dset4
  avh8: Average "Avg Temperature back - ht" on boundaries 42 | data = dset4
  int3: Integral "q_rxn_anode" on domains 5 | data = dset4
  int4: Integral "q_rev_anode" on domains 5 | data = dset4
  int5: Integral "q_ohm_solid_anode" on domains 5 | data = dset4
  int6: Integral "q_ohm_ionic_anode" on domains 5 | data = dset4
  int7: Integral "q_ohm_anode" on domains 5 | data = dset4
  int8: Integral "q_rxn_cathode" on domains 6 | data = dset4
  int9: Integral "q_rev_cathode" on domains 6 | data = dset4
  int10: Integral "q_ohm_solid_cathode" on domains 6 | data = dset4
  int11: Integral "q_ohm_ionic_cathode" on domains 6 | data = dset4
  int12: Integral "q_ohm_cathode" on domains 6 | data = dset4
  int8_ds1: Grid1D "Grid 1D 1b"
  ptds1: CutPoint1D
    data = int8_ds1
    pointx = 0.0 0.01012 0.019933 0.025759 0.049678 0.074746 0.088658 0.10028 0.20055 0.29991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
  an8_ds1: Grid1D "Grid 1D 1c"
  an6_ds1: Grid1D "Grid 1D 1d"
  an6_ds2: Grid1D "Grid 1D 2a"
  pw1_ds1: Grid1D "Grid 1D 1e"

Derived values
  pev3: EvalPoint "Avg Temperature front" | data = avh1; table = tbl1; expr = T
  pev4: EvalPoint "Avg Temperature back" | data = avh2; table = tbl1; expr = T
  pev5: EvalPoint "SOC anode avg." | data = avh3; table = tbl24; expr = q
  pev6: EvalPoint "ik probe" | data = avh4; table = tbl1; expr = ik
  pev7: EvalPoint "Vout" | data = avh5; table = tbl1; expr = Phis
  pev8: EvalPoint "SOC cathode max" | data = max1; table = tbl24; expr = q
  pev9: EvalPoint "SOC cathode avg." | data = avh6; table = tbl24; expr = q
  pev10: EvalPoint "SOC anode min" | data = min1; table = tbl24; expr = q
  pev11: EvalPoint "SOC cathode min" | data = min2; table = tbl24; expr = q
  pev12: EvalPoint "SOC anode max" | data = max2; table = tbl24; expr = q
  pev15: EvalPoint "Avg Temperature front - ht" | data = avh7; table = tbl1; expr = T
  pev16: EvalPoint "Avg Temperature back - ht" | data = avh8; table = tbl1; expr = T
  pev17: EvalPoint "q_rxn_anode" | data = int3; table = tbl25; expr = av*ik*eta
  pev18: EvalPoint "q_rev_anode" | data = int4; table = tbl25; expr = av*ik*T*DelSrxn
  pev19: EvalPoint "q_ohm_solid_anode" | data = int5; table = tbl25; expr = kappa_s*( (Nly*Phisx)^2 + Phisy^2 + Phisz^2)
  pev20: EvalPoint "q_ohm_ionic_anode" | data = int6; table = tbl25; expr = kappa_e*( (Nly*Phiex)^2+Phiey^2 + Phiez^2)
  pev21: EvalPoint "q_ohm_anode"
    data = int7
    table = tbl25
    expr = kappa_s*( (Nly*Phisx)^2 + Phisy^2 + Phisz^2) + kappa_e*( (Nly*Phiex)^2+Phiey^2 + Phiez^2)
  pev22: EvalPoint "q_rxn_cathode" | data = int8; table = tbl25; expr = av*ik*eta
  pev23: EvalPoint "q_rev_cathode" | data = int9; table = tbl25; expr = av*ik*T*DelSrxn
  pev24: EvalPoint "q_ohm_solid_cathode"
    data = int10
    table = tbl25
    expr = kappa_s*( (Nly*Phisx)^2 + Phisy^2 + Phisz^2)
  pev25: EvalPoint "q_ohm_ionic_cathode" | data = int11; table = tbl25; expr = kappa_e*( (Nly*Phiex)^2+Phiey^2 + Phiez^2)
  pev26: EvalPoint "q_ohm_cathode"
    data = int12
    table = tbl25
    expr = kappa_s*( (Nly*Phisx)^2 + Phisy^2 + Phisz^2) + kappa_e*( (Nly*Phiex)^2+Phiey^2 + Phiez^2)
  gev1: EvalGlobal "Current density" | data = dset3; table = tbl1

Tables
  tbl1: Table "Probe Table 1"
    Time (s) | Dependent variable Phis (degC), Avg Temperature front | Dependent variable Phis (degC), Avg Temperature back | Dependent variable Phis (A/m^2), ik probe | Dependent variable Phis (V), Vout | Dependent variable Phis (degC), Avg Temperature front - ht | Dependent variable Phis (degC), Avg Temperature back - ht | current (W/m^2)
    0 | 22.554 | 22.554 | -0.19866 | 3.22412 | 22.554 | 22.554 | 461538
    1 | 22.5699 | 22.5699 | -0.19866 | 3.21924 | 22.5699 | 22.5699 | 461538
    2 | 22.5869 | 22.5869 | -0.19866 | 3.21526 | 22.5869 | 22.5869 | 461538
    3 | 22.6045 | 22.6045 | -0.198661 | 3.21189 | 22.6045 | 22.6045 | 461538
    4 | 22.6226 | 22.6226 | -0.19866 | 3.20896 | 22.6226 | 22.6226 | 461538
    5 | 22.6411 | 22.6411 | -0.19866 | 3.20636 | 22.6411 | 22.6411 | 461538
    6 | 22.6598 | 22.6598 | -0.19866 | 3.20401 | 22.6598 | 22.6598 | 461538
    7 | 22.6789 | 22.6789 | -0.19866 | 3.20185 | 22.6789 | 22.6789 | 461538
    8 | 22.6983 | 22.6983 | -0.19866 | 3.19985 | 22.6983 | 22.6983 | 461538
    9 | 22.7179 | 22.7179 | -0.19866 | 3.19797 | 22.7179 | 22.7179 | 461538
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  tbl21: Table "2C_30SOC"
    t | V | I | Tambient | Tmean | Tcoldspot | Thotspot
    0 | 3.28639 | 0.000236883 | 22.8509 | 22.6739 | 22.6881 | 22.648
    1 | 3.26364 | -17.4123 | 22.8519 | 22.6656 | 22.6667 | 22.649
    2 | 3.26076 | -17.4116 | 22.8529 | 22.6741 | 22.7137 | 22.6609
    3 | 3.25825 | -17.4112 | 22.8536 | 22.6763 | 22.7071 | 22.6523
    4 | 3.25606 | -17.4085 | 22.8547 | 22.6719 | 22.686 | 22.6471
    5 | 3.25415 | -17.411 | 22.8558 | 22.6779 | 22.6958 | 22.6715
    6 | 3.2524 | -17.4136 | 22.8563 | 22.673 | 22.6941 | 22.6539
    7 | 3.25068 | -17.4124 | 22.8572 | 22.6729 | 22.6876 | 22.6639
    8 | 3.24917 | -17.4122 | 22.8582 | 22.6798 | 22.6839 | 22.6669
    9 | 3.24771 | -17.4143 | 22.86 | 22.6909 | 22.7228 | 22.6997
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  tbl22: Table "2C_50SOC"
    t | V | I | Tambient | Tmean | Tcoldspot | Thotspot
    0 | 3.29843 | 0.00024082 | 22.6029 | 22.4999 | 22.5774 | 22.4866
    1 | 3.27603 | -17.4075 | 22.6027 | 22.4953 | 22.5914 | 22.4609
    2 | 3.2733 | -17.4068 | 22.6025 | 22.4989 | 22.6071 | 22.4597
    3 | 3.27113 | -17.4056 | 22.6033 | 22.489 | 22.6145 | 22.4617
    4 | 3.26927 | -17.4075 | 22.6033 | 22.4871 | 22.5978 | 22.4607
    5 | 3.26765 | -17.4088 | 22.6032 | 22.4854 | 22.5945 | 22.455
    6 | 3.26616 | -17.4079 | 22.6026 | 22.496 | 22.6208 | 22.4921
    7 | 3.26478 | -17.4053 | 22.6021 | 22.4854 | 22.6146 | 22.4782
    8 | 3.26355 | -17.406 | 22.6024 | 22.4903 | 22.6234 | 22.4852
    9 | 3.26254 | -17.4069 | 22.6033 | 22.4919 | 22.6184 | 22.476
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  tbl23: Table "2C_70SOC"
    t | V | I | Tambient | Tmean | Tcoldspot | Thotspot
    0 | 3.30435 | 0.000265229 | 22.266 | 22.1365 | 22.2172 | 22.1058
    1 | 3.28207 | -17.4099 | 22.2668 | 22.1234 | 22.1992 | 22.0872
    2 | 3.2794 | -17.4108 | 22.2676 | 22.1302 | 22.2186 | 22.0914
    3 | 3.27714 | -17.4101 | 22.2682 | 22.1211 | 22.2154 | 22.1179
    4 | 3.27525 | -17.4068 | 22.2683 | 22.1149 | 22.1874 | 22.0845
    5 | 3.27357 | -17.4044 | 22.2685 | 22.1188 | 22.1977 | 22.0789
    6 | 3.27214 | -17.4071 | 22.2695 | 22.103 | 22.2006 | 22.0692
    7 | 3.27081 | -17.4081 | 22.2695 | 22.0954 | 22.184 | 22.0549
    8 | 3.26967 | -17.4052 | 22.2696 | 22.096 | 22.2014 | 22.0602
    9 | 3.26868 | -17.4043 | 22.2702 | 22.1151 | 22.2102 | 22.0836
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  tbl19: Table "4C_30SOC"
    t | V | I | Tambient | Tmean | Tcoldspot | Thotspot
    0 | 3.29327 | 0.000509315 | 22.4075 | 22.3708 | 22.4655 | 22.3396
    1 | 3.25389 | -36.0336 | 22.4063 | 22.3847 | 22.4724 | 22.347
    2 | 3.24804 | -35.989 | 22.4084 | 22.3953 | 22.4809 | 22.3724
    3 | 3.24307 | -36.0097 | 22.4081 | 22.3901 | 22.4927 | 22.3596
    4 | 3.23875 | -36.0295 | 22.4079 | 22.3936 | 22.5012 | 22.3645
    5 | 3.23499 | -36.0476 | 22.4096 | 22.4045 | 22.5242 | 22.3674
    6 | 3.23166 | -36.0475 | 22.409 | 22.4121 | 22.5158 | 22.3699
    7 | 3.22866 | -36.0491 | 22.4084 | 22.407 | 22.5264 | 22.3912
    8 | 3.2259 | -36.0567 | 22.409 | 22.42 | 22.5183 | 22.394
    9 | 3.2234 | -36.0584 | 22.4091 | 22.4195 | 22.5331 | 22.4077
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  tbl18: Table "4C_50SOC"
    t | V | I | Tambient | Tmean | Tcoldspot | Thotspot
    0 | 3.30181 | 0.000563644 | 22.3918 | 22.3943 | 22.4595 | 22.381
    1 | 3.2643 | -36.0492 | 22.3921 | 22.3794 | 22.4443 | 22.3639
    2 | 3.2592 | -36.0427 | 22.3924 | 22.3853 | 22.4589 | 22.3761
    3 | 3.25522 | -36.0069 | 22.3927 | 22.3782 | 22.4345 | 22.3601
    4 | 3.25175 | -35.9779 | 22.3931 | 22.3605 | 22.4194 | 22.3456
    5 | 3.24872 | -36.0056 | 22.3931 | 22.3759 | 22.4239 | 22.3617
    6 | 3.2461 | -36.0441 | 22.3945 | 22.3863 | 22.448 | 22.3816
    7 | 3.24392 | -36.0331 | 22.3939 | 22.3921 | 22.4565 | 22.3883
    8 | 3.24191 | -35.9864 | 22.3934 | 22.373 | 22.4526 | 22.3481
    9 | 3.23997 | -35.9663 | 22.3951 | 22.3791 | 22.4756 | 22.3415
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  tbl20: Table "4C_70SOC"
    t | V | I | Tambient | Tmean | Tcoldspot | Thotspot
    0 | 3.31124 | 0.000545534 | 22.3542 | 22.3124 | 22.3906 | 22.2803
    1 | 3.27402 | -36.0394 | 22.3538 | 22.3097 | 22.3858 | 22.2864
    2 | 3.26869 | -35.9672 | 22.3534 | 22.3156 | 22.4112 | 22.2943
    3 | 3.26433 | -35.9825 | 22.3541 | 22.3129 | 22.395 | 22.3036
    4 | 3.26064 | -35.9883 | 22.3547 | 22.3037 | 22.404 | 22.2579
    5 | 3.25749 | -36.0044 | 22.3553 | 22.2994 | 22.4035 | 22.269
    6 | 3.2548 | -36.0276 | 22.3552 | 22.305 | 22.3938 | 22.258
    7 | 3.25234 | -36.0263 | 22.3549 | 22.3103 | 22.401 | 22.2712
    8 | 3.2502 | -36.0211 | 22.3545 | 22.3078 | 22.3959 | 22.2673
    9 | 3.24833 | -36.0303 | 22.3543 | 22.3123 | 22.3971 | 22.2619
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  tbl2: Table "8C_30SOC"
    t | V | I | Tambient | Tmean | Tcoldspot | Thotspot
    0 | 3.27819 | 0.000972292 | 21.5243 | 21.3707 | 21.4251 | 21.3626
    1 | 3.19645 | -72.1368 | 21.5241 | 21.3783 | 21.4222 | 21.3682
    2 | 3.18499 | -72.0909 | 21.5248 | 21.3935 | 21.4529 | 21.3813
    3 | 3.17556 | -72.1181 | 21.5256 | 21.4127 | 21.458 | 21.3913
    4 | 3.16822 | -72.0688 | 21.5265 | 21.4348 | 21.4796 | 21.4123
    5 | 3.1622 | -71.9586 | 21.5249 | 21.4604 | 21.4959 | 21.4444
    6 | 3.15701 | -71.9633 | 21.526 | 21.4756 | 21.5186 | 21.4592
    7 | 3.15257 | -71.9847 | 21.527 | 21.4955 | 21.54 | 21.4715
    8 | 3.14902 | -71.956 | 21.5286 | 21.5221 | 21.5514 | 21.4969
    9 | 3.14607 | -71.8638 | 21.5288 | 21.5406 | 21.5841 | 21.5132
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  tbl16: Table "8C_50SOC"
    t | V | I | Tambient | Tmean | Tcoldspot | Thotspot
    0 | 3.29661 | 0.00194706 | 21.5409 | 21.4182 | 21.4534 | 21.3893
    1 | 3.21877 | -71.9941 | 21.5415 | 21.4374 | 21.493 | 21.4259
    2 | 3.20867 | -72.0208 | 21.5421 | 21.4339 | 21.5025 | 21.4043
    3 | 3.20086 | -72.0165 | 21.5417 | 21.4489 | 21.5017 | 21.4134
    4 | 3.19431 | -72.012 | 21.5413 | 21.4458 | 21.4864 | 21.4099
    5 | 3.18872 | -71.9521 | 21.544 | 21.4448 | 21.5081 | 21.4098
    6 | 3.18431 | -71.9551 | 21.544 | 21.444 | 21.5028 | 21.4088
    7 | 3.18064 | -72.0494 | 21.544 | 21.456 | 21.5293 | 21.4383
    8 | 3.17737 | -72.0072 | 21.5453 | 21.4707 | 21.5644 | 21.442
    9 | 3.17437 | -72.0298 | 21.5464 | 21.4804 | 21.5822 | 21.4624
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  tbl17: Table "8C_70SOC"
    t | V | I | Tambient | Tmean | Tcoldspot | Thotspot
    0 | 3.30389 | 0.00192344 | 21.243 | 21.0931 | 21.1855 | 21.0848
    1 | 3.22745 | -72.002 | 21.2434 | 21.0948 | 21.1706 | 21.0943
    2 | 3.21813 | -71.9746 | 21.245 | 21.115 | 21.2136 | 21.0832
    3 | 3.2112 | -71.9681 | 21.2451 | 21.1119 | 21.2074 | 21.1078
    4 | 3.20575 | -71.961 | 21.2451 | 21.1242 | 21.2167 | 21.0803
    5 | 3.20101 | -71.9649 | 21.2461 | 21.1201 | 21.2162 | 21.0737
    6 | 3.19695 | -72.0206 | 21.2463 | 21.1262 | 21.2018 | 21.0967
    7 | 3.19369 | -72.0709 | 21.2466 | 21.1244 | 21.2182 | 21.091
    8 | 3.19102 | -72.0139 | 21.2488 | 21.1249 | 21.2267 | 21.0829
    9 | 3.18895 | -71.9375 | 21.2486 | 21.12 | 21.2234 | 21.0822
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  tbl14: Table "2C_CCch"
    t | V | I | Tambient | Tmean | Tcoldspot | Thotspot
    0 | 2.40429 | 0.000258142 | 22.1986 | 22.131 | 22.2122 | 22.1101
    1 | 2.50818 | 17.1128 | 22.1997 | 22.1251 | 22.2109 | 22.1217
    2 | 2.54872 | 17.1131 | 22.1992 | 22.1199 | 22.2073 | 22.1241
    3 | 2.58109 | 17.1199 | 22.1996 | 22.1246 | 22.2086 | 22.1316
    4 | 2.60833 | 17.1227 | 22.2 | 22.1289 | 22.21 | 22.1275
    5 | 2.63218 | 17.1315 | 22.2009 | 22.1266 | 22.2138 | 22.1214
    6 | 2.65336 | 17.1422 | 22.2005 | 22.1284 | 22.2157 | 22.111
    7 | 2.67269 | 17.1371 | 22.2002 | 22.1294 | 22.2474 | 22.1006
    8 | 2.6909 | 17.1282 | 22.202 | 22.1207 | 22.2265 | 22.1054
    9 | 2.70809 | 17.144 | 22.2023 | 22.1178 | 22.2067 | 22.0991
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  tbl15: Table "2C_CCdch"
    t | V | I | Tambient | Tmean | Tcoldspot | Thotspot
    0 | 3.49993 | 0.000268378 | 22.0761 | 21.8816 | 21.9433 | 21.8412
    1 | 3.46131 | -17.405 | 22.0755 | 21.8904 | 21.944 | 21.8565
    2 | 3.44772 | -17.4054 | 22.0748 | 21.8905 | 21.9589 | 21.8905
    3 | 3.43656 | -17.4057 | 22.0777 | 21.8999 | 21.9705 | 21.8734
    4 | 3.42698 | -17.4066 | 22.0782 | 21.9107 | 21.9758 | 21.9038
    5 | 3.4184 | -17.403 | 22.0788 | 21.8862 | 21.9676 | 21.8766
    6 | 3.41064 | -17.4022 | 22.0783 | 21.9093 | 21.9705 | 21.8721
    7 | 3.40379 | -17.4039 | 22.0781 | 21.9126 | 21.9957 | 21.8681
    8 | 3.39759 | -17.4064 | 22.078 | 21.9064 | 21.985 | 21.8958
    9 | 3.39196 | -17.4047 | 22.0791 | 21.8922 | 21.9751 | 21.8811
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  tbl12: Table "4C_CCch"
    t | V | I | Tambient | Tmean | Tcoldspot | Thotspot
    0 | 2.65073 | 0.000520338 | 22.5938 | 22.569 | 22.6127 | 22.5937
    1 | 2.73491 | 35.9619 | 22.5935 | 22.5542 | 22.5799 | 22.5469
    2 | 2.76699 | 36.017 | 22.594 | 22.5407 | 22.5549 | 22.5378
    3 | 2.79375 | 36.0265 | 22.594 | 22.5239 | 22.5581 | 22.517
    4 | 2.81687 | 35.998 | 22.5937 | 22.5102 | 22.5614 | 22.5302
    5 | 2.83729 | 35.9569 | 22.5934 | 22.4858 | 22.534 | 22.4715
    6 | 2.85574 | 35.9724 | 22.5945 | 22.478 | 22.5157 | 22.4746
    7 | 2.87277 | 35.9968 | 22.5943 | 22.4696 | 22.5094 | 22.4689
    8 | 2.88855 | 36.0201 | 22.594 | 22.47 | 22.515 | 22.4697
    9 | 2.90336 | 36.026 | 22.5929 | 22.4571 | 22.5116 | 22.4662
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  tbl13: Table "4C_CCdch"
    t | V | I | Tambient | Tmean | Tcoldspot | Thotspot
    0 | 3.51954 | 0.000500654 | 22.3845 | 22.2647 | 22.2847 | 22.2232
    1 | 3.44833 | -35.9957 | 22.3853 | 22.2692 | 22.3073 | 22.2243
    2 | 3.42301 | -36.0063 | 22.3842 | 22.2759 | 22.2955 | 22.2641
    3 | 3.4037 | -35.9871 | 22.3852 | 22.2891 | 22.3299 | 22.2603
    4 | 3.3884 | -36.0083 | 22.3857 | 22.284 | 22.306 | 22.2598
    5 | 3.37577 | -36.0338 | 22.3863 | 22.2772 | 22.2932 | 22.2513
    6 | 3.36506 | -36.0126 | 22.386 | 22.2878 | 22.3304 | 22.2688
    7 | 3.35574 | -36.0138 | 22.3864 | 22.279 | 22.3274 | 22.2572
    8 | 3.34764 | -36.0185 | 22.3869 | 22.2893 | 22.3379 | 22.2726
    9 | 3.34041 | -36.0318 | 22.3874 | 22.2865 | 22.3186 | 22.2669
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  tbl10: Table "6C_CCch"
    t | V | I | Tambient | Tmean | Tcoldspot | Thotspot
    0 | 2.634 | 0.00142031 | 20.9317 | 20.7379 | 20.8263 | 20.7449
    1 | 2.77113 | 54.0162 | 20.9319 | 20.7266 | 20.8272 | 20.7219
    2 | 2.81558 | 53.9817 | 20.9332 | 20.7199 | 20.8236 | 20.7182
    3 | 2.85082 | 53.9857 | 20.934 | 20.7265 | 20.8133 | 20.7404
    4 | 2.8799 | 54.0686 | 20.934 | 20.7142 | 20.8087 | 20.6954
    5 | 2.90526 | 54.0415 | 20.9341 | 20.6969 | 20.8072 | 20.6774
    6 | 2.92829 | 53.992 | 20.9349 | 20.7032 | 20.8145 | 20.6865
    7 | 2.9497 | 54.002 | 20.9351 | 20.693 | 20.8069 | 20.6758
    8 | 2.96931 | 54.0506 | 20.9352 | 20.6903 | 20.8088 | 20.6856
    9 | 2.98658 | 54.0032 | 20.9356 | 20.6816 | 20.8051 | 20.6881
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  tbl11: Table "6C_CCdch"
    t | V | I | Tambient | Tmean | Tcoldspot | Thotspot
    0 | 3.53216 | 0.00142031 | 21.6371 | 21.5001 | 21.5603 | 21.4686
    1 | 3.42351 | -53.9723 | 21.6379 | 21.499 | 21.5478 | 21.4472
    2 | 3.38817 | -54.012 | 21.6386 | 21.502 | 21.5508 | 21.4786
    3 | 3.36381 | -54.0298 | 21.64 | 21.5087 | 21.5514 | 21.4863
    4 | 3.3455 | -54.0027 | 21.6397 | 21.5077 | 21.5783 | 21.4872
    5 | 3.33109 | -54.0325 | 21.6394 | 21.5169 | 21.5739 | 21.4828
    6 | 3.31931 | -53.9865 | 21.6406 | 21.5342 | 21.6024 | 21.4817
    7 | 3.30928 | -53.9884 | 21.6413 | 21.5343 | 21.5878 | 21.4913
    8 | 3.30065 | -54.0067 | 21.642 | 21.5394 | 21.6068 | 21.4854
    9 | 3.29311 | -54.0025 | 21.6425 | 21.5502 | 21.6139 | 21.5197
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  tbl6: Table "8C_CCch"
    t | V | I | Tambient | Tmean | Tcoldspot | Thotspot
    0 | 2.66652 | 0.00191084 | 20.714 | 20.5242 | 20.5926 | 20.5253
    1 | 2.83067 | 71.8049 | 20.7142 | 20.5071 | 20.5816 | 20.5346
    2 | 2.8783 | 71.9299 | 20.7145 | 20.5023 | 20.5817 | 20.5156
    3 | 2.91665 | 72.059 | 20.7142 | 20.4814 | 20.5652 | 20.4619
    4 | 2.94889 | 72.139 | 20.7152 | 20.4657 | 20.5636 | 20.4343
    5 | 2.97694 | 72.0269 | 20.7162 | 20.4601 | 20.5769 | 20.4625
    6 | 3.0021 | 72.053 | 20.7161 | 20.4489 | 20.5427 | 20.4362
    7 | 3.02485 | 72.101 | 20.7168 | 20.4396 | 20.5441 | 20.421
    8 | 3.04514 | 72.0487 | 20.7175 | 20.4214 | 20.5365 | 20.3991
    9 | 3.06345 | 72.0168 | 20.7186 | 20.3957 | 20.5301 | 20.3792
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  tbl7: Table "8C_CCdch"
    t | V | I | Tambient | Tmean | Tcoldspot | Thotspot
    0 | 3.55492 | 0.00192029 | 22.1811 | 22.0212 | 22.0747 | 22.0032
    1 | 3.40763 | -72.0213 | 22.181 | 22.042 | 22.0946 | 22.0273
    2 | 3.3636 | -72.0118 | 22.1809 | 22.0442 | 22.1063 | 22.0408
    3 | 3.33502 | -72.0613 | 22.1813 | 22.0588 | 22.1136 | 22.0445
    4 | 3.31446 | -72.0345 | 22.1817 | 22.0584 | 22.1183 | 22.0345
    5 | 3.29843 | -72.0279 | 22.1836 | 22.0756 | 22.1384 | 22.0705
    6 | 3.28559 | -72.0201 | 22.184 | 22.0817 | 22.1513 | 22.0694
    7 | 3.27501 | -72.0243 | 22.1844 | 22.0928 | 22.1665 | 22.0705
    8 | 3.26622 | -72.0197 | 22.1863 | 22.1222 | 22.1743 | 22.0947
    9 | 3.25883 | -72.0393 | 22.1866 | 22.1136 | 22.175 | 22.093
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  tbl8: Table "10C_CCch"
    t | V | I | Tambient | Tmean | Tcoldspot | Thotspot
    0 | 2.7661 | 0.000847099 | 22.2212 | 22.113 | 22.1767 | 22.0727
    1 | 2.91832 | 89.9394 | 22.2211 | 22.1039 | 22.1757 | 22.0833
    2 | 2.96186 | 89.9836 | 22.2219 | 22.0875 | 22.1505 | 22.0568
    3 | 2.99783 | 89.9969 | 22.2221 | 22.0569 | 22.1454 | 22.0195
    4 | 3.02862 | 89.847 | 22.2223 | 22.0442 | 22.1474 | 21.9913
    5 | 3.0555 | 89.8735 | 22.2227 | 22.0441 | 22.1584 | 22.0011
    6 | 3.07885 | 89.8718 | 22.2227 | 22.0267 | 22.144 | 21.9812
    7 | 3.10049 | 89.8573 | 22.2227 | 22.02 | 22.1452 | 21.965
    8 | 3.12042 | 89.9136 | 22.2232 | 22.007 | 22.1389 | 21.9696
    9 | 3.13887 | 89.9247 | 22.2235 | 22.0174 | 22.1613 | 21.9641
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  tbl9: Table "10C_CCdch"
    t | V | I | Tambient | Tmean | Tcoldspot | Thotspot
    0 | 3.52063 | 0.00090379 | 21.091 | 20.9474 | 21.019 | 20.9257
    1 | 3.35195 | -90.1231 | 21.0903 | 20.9592 | 21.0398 | 20.9527
    2 | 3.31063 | -89.9968 | 21.0895 | 20.9767 | 21.0351 | 20.9553
    3 | 3.28419 | -89.9834 | 21.0897 | 20.9994 | 21.064 | 21.0027
    4 | 3.2652 | -90.0112 | 21.0898 | 21.0107 | 21.0969 | 20.989
    5 | 3.25045 | -89.8623 | 21.0899 | 21.0214 | 21.0999 | 20.9853
    6 | 3.23867 | -89.8483 | 21.0902 | 21.0148 | 21.0965 | 20.982
    7 | 3.22922 | -89.8487 | 21.0903 | 21.0368 | 21.1337 | 21.0197
    8 | 3.22135 | -89.9738 | 21.0903 | 21.0493 | 21.1384 | 21.0318
    9 | 3.21494 | -90.0107 | 21.0907 | 21.0668 | 21.1608 | 21.0519
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  tbl24: Table "SOC results"
    Time (s) | q (1), SOC anode avg. | q (1), SOC cathode max | q (1), SOC cathode avg. | q (1), SOC anode min | q (1), SOC cathode min | q (1), SOC anode max
    0 | 0.7 | 0.3 | 0.3 | 0.7 | 0.3 | 0.7
    1 | 0.697778 | 0.386797 | 0.302222 | 0.613203 | 0.299978 | 0.700022
    2 | 0.695556 | 0.439889 | 0.304444 | 0.560109 | 0.299954 | 0.700046
    3 | 0.693333 | 0.475805 | 0.306667 | 0.524192 | 0.299944 | 0.700056
    4 | 0.691111 | 0.501199 | 0.308889 | 0.498796 | 0.299963 | 0.700037
    5 | 0.688889 | 0.520519 | 0.311111 | 0.479475 | 0.299991 | 0.700009
    6 | 0.686667 | 0.536354 | 0.313333 | 0.463639 | 0.299986 | 0.700014
    7 | 0.684444 | 0.550104 | 0.315556 | 0.449888 | 0.299979 | 0.700021
    8 | 0.682222 | 0.562501 | 0.317778 | 0.43749 | 0.299971 | 0.700029
    9 | 0.68 | 0.573875 | 0.32 | 0.426115 | 0.299962 | 0.700039
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  tbl25: Table "Q_table"
    Time (s) | q_rnx_anode (W), q_rxn_anode | q_rev_anode (W), q_rev_anode | q_ohm_solid_anode (W), q_ohm_solid_anode | q_ohm_ionic_anode (W), q_ohm_ionic_anode | q_ohm_anode (W), q_ohm_anode | q_rxn_cathode (W), q_rxn_cathode | q_rev_cathode (W), q_rev_cathode | q_ohm_solid_cathode (W), q_ohm_solid_cathode | q_ohm_ionic_cathode (W), q_ohm_ionic_cathode | q_ohm_cathode (W), q_ohm_cathode
    0 | 0.250738 | 0.413039 | 0.0010233 | 0.248108 | 0.249131 | 0.250738 | 0.413039 | 0.0010234 | 0.248108 | 0.249132
    1 | 0.165852 | 0.41307 | 0.000927706 | 0.321964 | 0.322891 | 0.165852 | 0.413071 | 0.000927809 | 0.321964 | 0.322892
    2 | 0.126001 | 0.4131 | 0.000873419 | 0.391567 | 0.39244 | 0.126001 | 0.413101 | 0.000873523 | 0.391567 | 0.392441
    3 | 0.103933 | 0.413126 | 0.000838185 | 0.455602 | 0.45644 | 0.103933 | 0.413131 | 0.000838288 | 0.455602 | 0.45644
    4 | 0.0902162 | 0.413155 | 0.000813238 | 0.513313 | 0.514127 | 0.0902164 | 0.413157 | 0.000813341 | 0.513313 | 0.514127
    5 | 0.0807635 | 0.413183 | 0.00079403 | 0.565509 | 0.566303 | 0.0807636 | 0.413185 | 0.000794133 | 0.565509 | 0.566303
    6 | 0.073748 | 0.413211 | 0.000778223 | 0.613267 | 0.614046 | 0.0737481 | 0.413213 | 0.000778326 | 0.613267 | 0.614046
    7 | 0.0682696 | 0.41324 | 0.00076458 | 0.657485 | 0.65825 | 0.0682697 | 0.413241 | 0.000764683 | 0.657485 | 0.65825
    8 | 0.0638356 | 0.413268 | 0.000752412 | 0.698836 | 0.699589 | 0.0638356 | 0.413269 | 0.000752515 | 0.698836 | 0.699589
    9 | 0.0601583 | 0.413298 | 0.000741344 | 0.737599 | 0.73834 | 0.0601583 | 0.413297 | 0.000741446 | 0.737599 | 0.73834
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
Plots
  pg2: PlotGroup3D "Phis" | data = dset1
    vol1: Volume | expr = Phis
  pg24: PlotGroup3D "Phie" | data = dset1
    vol1: Volume | expr = Phie
  pg26: PlotGroup3D "Ueq" | data = dset1
    vol1: Volume | expr = U; descr = Equilibrium Voltage
  pg25: PlotGroup3D "eta" | data = dset1
    vol1: Volume | expr = eta
  pg1: PlotGroup3D "Heat Equation" | data = dset1
    vol1: Volume | expr = T; unit = K
    con1: Contour | expr = T; unit = K
  pg6: PlotGroup1D "Average Temperature Plot"
    tblp1: Table "Tavg_out" | table = tbl1; xaxisdata = auto; plotcolumns = 2
    tblp2: Table "Table Graph 2" (disabled) | table = tbl2; xaxisdata = 1; plotcolumninput = manual; plotcolumns = 3
    tblp3: Table "Table Graph 3" | table = tbl12; xaxisdata = 1; plotcolumninput = manual; plotcolumns = 5
  pg13: PlotGroup1D "Voltage plot CC" | data = none; xlabel = Time (s); ylabel = Voltage (V)
    tblp1: Table "Vout" | table = tbl1; xaxisdata = auto; plotcolumns = 5
    tblp2: Table "Experimental Voltage" | table = tbl12; xaxisdata = 1; plotcolumninput = manual; plotcolumns = 2
  pg5: PlotGroup1D "Voltage plots pulse" | data = none; xlabel = Time (s); ylabel = Voltage (V)
    tblp1: Table "Vout" | table = tbl1; xaxisdata = auto; plotcolumns = 5
    tblp2: Table "Experimental Voltage"
      table = tbl17
      xaxisdata = 1
      plotcolumninput = manual
      plotcolumns = 2
      preprocx = linear
      shiftx = -1
    tblp3: Table "Probe Table Graph 3" | table = tbl24; xaxisdata = auto; plotcolumns = {2, 3, 4, 5, 6, 7}
  pg10: PlotGroup3D "SOC" | data = dset1
    vol1: Volume | expr = q
  pg16: PlotGroup1D "OCP plots" | xlabel = SOC (-); ylabel = OCP
    plot2: Function | data = int4_ds2; expr = U_OCP_dch(t)
    plot3: Function | data = int4_ds1; expr = U_OCP_ch(t)
    plot4: Function | data = an1_ds1; expr = U_OCP(x); descr = U_OCP(t); xdataexpr = x
  pg21: PlotGroup1D "State of charges." | data = dset1; xlabel = Time (s); ylabel = SOC (-)
    tblp1: Table "Anode SOC" | table = tbl24; xaxisdata = auto; plotcolumninput = manual; plotcolumns = 5
    tblp5: Table "Anode SOC 2" | table = tbl24; xaxisdata = auto; plotcolumninput = manual; plotcolumns = 6
    tblp3: Table "Anode SOC 1" | table = tbl24; xaxisdata = auto; plotcolumninput = manual; plotcolumns = 2
    tblp6: Table "Anode SOC 1.2" | table = tbl24; xaxisdata = auto; plotcolumninput = manual; plotcolumns = 4
    tblp4: Table "Anode SOC 1.1" | table = tbl24; xaxisdata = auto; plotcolumninput = manual; plotcolumns = 7
    tblp7: Table "Anode SOC 1.1.1" | table = tbl24; xaxisdata = auto; plotcolumninput = manual; plotcolumns = 3
  pg23: PlotGroup1D "Heat generation plot"
    tblp1: Table "Probe Table Graph 1" | table = tbl25; xaxisdata = auto; plotcolumns = {2, 3, 4, 5, 6, 7, 8, 9, 10, 11}
  pg27: PlotGroup1D "Probe Plot Group 27"
    tblp1: Table "Probe Table Graph 1" | table = tbl1
  pg28: PlotGroup1D "1D Plot Group 28" | data = int8_ds1
    plot1: Function | expr = delS_Jalkanen(t)/F_const; unit = mV/K
  pg29: PlotGroup1D "1D Plot Group 29" | data = an8_ds1
    plot1: Function | expr = U_linear8(qc)
    plot2: Function | expr = U_linear(qc)
    plot3: Function | expr = pw1(qc)
  pg30: PlotGroup1D "Probe Plot Group 30"
    tblp1: Table "Probe Table Graph 1" | table = tbl1

Exports
  data2: Data "Back surface data"
    data = surf1
    solnumindices = 1,2,3
    expr = {T, , , }
    unit = {degC, , , }
    descr = {Dependent variable T, , , }
    filename = SimT_saved.txt
    location = regulargrid
    regulargridlevel = surface
    regulargridx2 = N_short
    regulargridy2 = N_long
    previousfilename = SimT_saved.txt
    includecoords = off
    datasupportsgp = on
  anim1: Animation | target = player
  tbl1: Table | table = tbl25; filename = Q_table.txt